// SBML level 2 version 3

model GPGeneratedModel()

  // Species:
  substanceOnly species ERK in compartment = 0.025;
  substanceOnly species ERKPP in compartment = 0;
  substanceOnly species ERKPP|ERK in compartment = 0;
  substanceOnly species ERKPP|MEKPP in compartment = 0;
  substanceOnly species ERKPP|MEKPP|ERK in compartment = 0;
  substanceOnly species ERKPP|RKIP in compartment = 0;
  substanceOnly species ERKPP|RKIPP in compartment = 0;
  substanceOnly species ERKPP|RP in compartment = 0;
  substanceOnly species ERKPP|RP|RKIPP in compartment = 0;
  substanceOnly species ERKPP|Raf1Star in compartment = 0;
  substanceOnly species ERKPP|Raf1Star|RKIP in compartment = 0;
  substanceOnly species ERKPP|Raf1Star|RKIP|ERKPP in compartment = 0;
  substanceOnly species ERK|ERKPP in compartment = 0;
  substanceOnly species ERK|MEKPP in compartment = 0;
  substanceOnly species ERK|MEKPP|ERK in compartment = 0;
  substanceOnly species ERK|RKIP in compartment = 0;
  substanceOnly species ERK|RKIPP in compartment = 0;
  substanceOnly species ERK|RP in compartment = 0;
  substanceOnly species ERK|RP|RKIPP in compartment = 0;
  substanceOnly species ERK|Raf1Star in compartment = 0;
  substanceOnly species ERK|Raf1Star|RKIP in compartment = 0;
  substanceOnly species ERK|Raf1Star|RKIP|ERKPP in compartment = 0;
  substanceOnly species MEKPP in compartment = 0.025;
  substanceOnly species MEKPP|ERK in compartment = 0;
  substanceOnly species MEKPP|ERKPP in compartment = 0;
  substanceOnly species MEKPP|ERK|ERK in compartment = 0;
  substanceOnly species MEKPP|ERK|ERKPP in compartment = 0;
  substanceOnly species MEKPP|ERK|MEKPP in compartment = 0;
  substanceOnly species MEKPP|ERK|RKIP in compartment = 0;
  substanceOnly species MEKPP|ERK|RKIPP in compartment = 0;
  substanceOnly species MEKPP|ERK|RP in compartment = 0;
  substanceOnly species MEKPP|ERK|RP|RKIPP in compartment = 0;
  substanceOnly species MEKPP|ERK|Raf1Star in compartment = 0;
  substanceOnly species MEKPP|ERK|Raf1Star|RKIP in compartment = 0;
  substanceOnly species MEKPP|ERK|Raf1Star|RKIP|ERKPP in compartment = 0;
  substanceOnly species MEKPP|MEKPP|ERK in compartment = 0;
  substanceOnly species MEKPP|RKIP in compartment = 0;
  substanceOnly species MEKPP|RKIPP in compartment = 0;
  substanceOnly species MEKPP|RP in compartment = 0;
  substanceOnly species MEKPP|RP|RKIPP in compartment = 0;
  substanceOnly species MEKPP|Raf1Star in compartment = 0;
  substanceOnly species MEKPP|Raf1Star|RKIP in compartment = 0;
  substanceOnly species MEKPP|Raf1Star|RKIP|ERKPP in compartment = 0;
  substanceOnly species RKIP in compartment = 0.025;
  substanceOnly species RKIPP in compartment = 0;
  substanceOnly species RKIPP|ERK in compartment = 0;
  substanceOnly species RKIPP|ERKPP in compartment = 0;
  substanceOnly species RKIPP|MEKPP in compartment = 0;
  substanceOnly species RKIPP|MEKPP|ERK in compartment = 0;
  substanceOnly species RKIPP|RKIP in compartment = 0;
  substanceOnly species RKIPP|RP in compartment = 0;
  substanceOnly species RKIPP|RP|RKIPP in compartment = 0;
  substanceOnly species RKIPP|Raf1Star in compartment = 0;
  substanceOnly species RKIPP|Raf1Star|RKIP in compartment = 0;
  substanceOnly species RKIPP|Raf1Star|RKIP|ERKPP in compartment = 0;
  substanceOnly species RKIP|ERK in compartment = 0;
  substanceOnly species RKIP|ERKPP in compartment = 0;
  substanceOnly species RKIP|MEKPP in compartment = 0;
  substanceOnly species RKIP|MEKPP|ERK in compartment = 0;
  substanceOnly species RKIP|RKIPP in compartment = 0;
  substanceOnly species RKIP|RP in compartment = 0;
  substanceOnly species RKIP|RP|RKIPP in compartment = 0;
  substanceOnly species RKIP|Raf1Star in compartment = 0;
  substanceOnly species RKIP|Raf1Star|RKIP in compartment = 0;
  substanceOnly species RKIP|Raf1Star|RKIP|ERKPP in compartment = 0;
  substanceOnly species RP in compartment = 0.03;
  substanceOnly species RP|ERK in compartment = 0;
  substanceOnly species RP|ERKPP in compartment = 0;
  substanceOnly species RP|MEKPP in compartment = 0;
  substanceOnly species RP|MEKPP|ERK in compartment = 0;
  substanceOnly species RP|RKIP in compartment = 0;
  substanceOnly species RP|RKIPP in compartment = 0;
  substanceOnly species RP|RKIPP|ERK in compartment = 0;
  substanceOnly species RP|RKIPP|ERKPP in compartment = 0;
  substanceOnly species RP|RKIPP|MEKPP in compartment = 0;
  substanceOnly species RP|RKIPP|MEKPP|ERK in compartment = 0;
  substanceOnly species RP|RKIPP|RKIP in compartment = 0;
  substanceOnly species RP|RKIPP|RKIPP in compartment = 0;
  substanceOnly species RP|RKIPP|RP in compartment = 0;
  substanceOnly species RP|RKIPP|Raf1Star in compartment = 0;
  substanceOnly species RP|RKIPP|Raf1Star|RKIP in compartment = 0;
  substanceOnly species RP|RKIPP|Raf1Star|RKIP|ERKPP in compartment = 0;
  substanceOnly species RP|RP|RKIPP in compartment = 0;
  substanceOnly species RP|Raf1Star in compartment = 0;
  substanceOnly species RP|Raf1Star|RKIP in compartment = 0;
  substanceOnly species RP|Raf1Star|RKIP|ERKPP in compartment = 0;
  substanceOnly species Raf1Star in compartment = 0.025;
  substanceOnly species Raf1Star|ERK in compartment = 0;
  substanceOnly species Raf1Star|ERKPP in compartment = 0;
  substanceOnly species Raf1Star|MEKPP in compartment = 0;
  substanceOnly species Raf1Star|MEKPP|ERK in compartment = 0;
  substanceOnly species Raf1Star|RKIP in compartment = 0;
  substanceOnly species Raf1Star|RKIPP in compartment = 0;
  substanceOnly species Raf1Star|RKIP|ERK in compartment = 0;
  substanceOnly species Raf1Star|RKIP|ERKPP in compartment = 0;
  substanceOnly species Raf1Star|RKIP|ERKPP|ERK in compartment = 0;
  substanceOnly species Raf1Star|RKIP|ERKPP|ERKPP in compartment = 0;
  substanceOnly species Raf1Star|RKIP|ERKPP|MEKPP in compartment = 0;
  substanceOnly species Raf1Star|RKIP|ERKPP|MEKPP|ERK in compartment = 0;
  substanceOnly species Raf1Star|RKIP|ERKPP|RKIP in compartment = 0;
  substanceOnly species Raf1Star|RKIP|ERKPP|RKIPP in compartment = 0;
  substanceOnly species Raf1Star|RKIP|ERKPP|RP in compartment = 0;
  substanceOnly species Raf1Star|RKIP|ERKPP|RP|RKIPP in compartment = 0;
  substanceOnly species Raf1Star|RKIP|ERKPP|Raf1Star in compartment = 0;
  substanceOnly species Raf1Star|RKIP|ERKPP|Raf1Star|RKIP in compartment = 0;
  substanceOnly species Raf1Star|RKIP|MEKPP in compartment = 0;
  substanceOnly species Raf1Star|RKIP|MEKPP|ERK in compartment = 0;
  substanceOnly species Raf1Star|RKIP|RKIP in compartment = 0;
  substanceOnly species Raf1Star|RKIP|RKIPP in compartment = 0;
  substanceOnly species Raf1Star|RKIP|RP in compartment = 0;
  substanceOnly species Raf1Star|RKIP|RP|RKIPP in compartment = 0;
  substanceOnly species Raf1Star|RKIP|Raf1Star in compartment = 0;
  substanceOnly species Raf1Star|RKIP|Raf1Star|RKIP|ERKPP in compartment = 0;
  substanceOnly species Raf1Star|RP in compartment = 0;
  substanceOnly species Raf1Star|RP|RKIPP in compartment = 0;
  substanceOnly species Raf1Star|Raf1Star|RKIP in compartment = 0;
  substanceOnly species Raf1Star|Raf1Star|RKIP|ERKPP in compartment = 0;

  // Parameters:
  k0 = 0.00306865;
  k1 = 0.7432145;
  k2 = 0.2643638;
  k3 = 0.5897783;
  k4 = 0.4705521;
  k5 = 0.9026621;
  k6 = 0.3420647;
  k7 = 0.5067047;
  k8 = 0.6112506;
  k9 = 0.3721565;
  k10 = 0.6856854;
  k11 = 0.9985138;
  k12 = 0.9502666;
  k13 = 0.04733162;
  k14 = 0.7366904;
  k15 = 0.1041648;
  k16 = 0.1467536;
  k17 = 0.5369782;
  k18 = 0.9547813;
  k19 = 0.7777525;
  k20 = 0.8487132;
  k21 = 0.7369527;
  k22 = 0.2780502;
  k23 = 0.280456;
  k24 = 0.7131806;
  k25 = 0.9513876;
  k26 = 0.2954112;
  k27 = 0.86;
  k28 = 0.2767131;
  k29 = 0.6780128;
  k30 = 0.3605939;
  k31 = 0.5812988;
  k32 = 0.2999275;
  k33 = 0.899305;
  k34 = 0.7301716;
  k35 = 0.5699759;
  k36 = 0.7147921;
  k37 = 0.9732638;
  k38 = 0.8491237;
  k39 = 0.8397594;
  k40 = 0.06100962;
  k41 = 0.869489;
  k42 = 0.6460058;
  k43 = 0.7850601;
  k44 = 0.7313466;
  k45 = 0.3807546;
  k46 = 0.7075235;
  k47 = 0.8089933;
  k48 = 0.5439975;
  k49 = 0.4219772;
  k50 = 0.2647113;
  k51 = 0.1057988;
  k52 = 0.0262435;
  k53 = 0.4912518;
  k54 = 0.1643536;
  k55 = 0.8605001;
  k56 = 0.4118522;
  k57 = 0.3393044;
  k58 = 0.714379;
  k59 = 0.3336862;
  k60 = 0.292972;
  k61 = 0.631904;
  k62 = 0.7011841;
  k63 = 0.1344486;
  k64 = 0.8258457;
  k65 = 0.2081783;
  k66 = 0.9025882;
  k67 = 0.3246584;
  k68 = 0.7473731;
  k69 = 0.4195296;
  k70 = 0.7094042;
  k71 = 0.6528558;
  k72 = 0.1371645;
  k73 = 0.2062707;
  k74 = 0.3754488;
  k75 = 0.1313925;
  k76 = 0.1850591;
  k77 = 0.02444153;
  k78 = 0.3745819;
  k79 = 0.8009832;
  k80 = 0.8774424;
  k81 = 0.600725;
  k82 = 0.7925185;
  k83 = 0.2945503;
  k84 = 0.5052817;
  k85 = 0.7059086;
  k86 = 0.5382381;
  k87 = 0.3850053;
  k88 = 0.4495542;
  k89 = 0.247986;
  k90 = 0.6105298;
  k91 = 0.9628579;
  k92 = 0.3547368;
  k93 = 0.3524642;
  k94 = 0.8028969;
  k95 = 0.3083582;
  k96 = 0.03348262;
  k97 = 0.1029614;
  k98 = 0.5326456;
  k99 = 0.6294686;
  k100 = 0.2012296;
  k101 = 0.700367;
  k102 = 0.6559826;
  k103 = 0.5341307;
  k104 = 0.1557122;
  k105 = 0.1649547;
  k106 = 0.432612;
  k107 = 0.5956819;
  k108 = 0.9174135;
  k109 = 0.2493402;
  k110 = 0.6198081;
  k111 = 0.3781068;
  k112 = 0.6165024;
  k113 = 0.4073166;
  k114 = 0.7790322;
  k115 = 0.8767814;
  k116 = 0.9219557;
  k117 = 0.7633502;
  k118 = 0.1884328;
  k119 = 0.3550653;
  k120 = 0.3510553;
  k121 = 0.423406;
  k122 = 0.2056672;
  k123 = 0.1746635;
  k124 = 0.3642011;
  k125 = 0.008251977;
  k126 = 0.4609276;
  k127 = 0.2420146;
  k128 = 0.8674046;
  k129 = 0.4544155;
  k130 = 0.6842825;
  k131 = 0.9104591;
  k132 = 0.6491474;
  k133 = 0.8966816;
  k134 = 0.6856521;
  k135 = 0.2630645;
  k136 = 0.1652364;
  k137 = 0.7270428;
  k138 = 0.4034282;
  k139 = 0.0858111;
  k140 = 0.08104558;
  k141 = 0.9932878;
  k142 = 0.2165647;
  k143 = 0.7193167;
  k144 = 0.9700978;
  k145 = 0.02874399;
  k146 = 0.1322365;
  k147 = 0.7185554;
  k148 = 0.857107;
  k149 = 0.7840899;
  k150 = 0.04106639;
  k151 = 0.3916124;
  k152 = 0.233846;
  k153 = 0.05387597;
  k154 = 0.5971134;
  k155 = 0.2853735;
  k156 = 0.8336716;
  k157 = 0.2842855;
  k158 = 0.5504039;
  k159 = 0.1470083;
  k160 = 0.8513779;
  k161 = 0.1623877;
  k162 = 0.741357;
  k163 = 0.9526319;
  k164 = 0.7423651;
  k165 = 0.7662406;
  k166 = 0.8045964;
  k167 = 0.6144867;
  k168 = 0.9617219;
  k169 = 0.04094192;
  k170 = 0.7254256;
  k171 = 0.6436064;
  k172 = 0.9964325;
  k173 = 0.5337017;
  k174 = 0.2273135;
  k175 = 0.8756683;
  k176 = 0.5677473;
  k177 = 0.8619379;
  k178 = 0.5929329;
  k179 = 0.3981264;
  k180 = 0.423766;
  k181 = 0.8439822;
  k182 = 0.152567;
  k183 = 0.2574202;
  k184 = 0.4984091;
  k185 = 0.06128949;
  k186 = 0.4865734;
  k187 = 0.5452119;
  k188 = 0.9364146;
  k189 = 0.8363474;
  k190 = 0.6157094;
  k191 = 0.6931085;
  k192 = 0.1592472;
  k193 = 0.1887529;
  k194 = 0.7579134;
  k195 = 0.1362487;
  k196 = 0.5612482;
  k197 = 0.6904644;
  k198 = 0.5892372;
  k199 = 0.2344193;
  k200 = 0.5731228;
  k201 = 0.7424105;
  k202 = 0.4742069;
  k203 = 0.09680801;
  k204 = 0.5446701;
  k205 = 0.7504961;
  k206 = 0.5506698;
  k207 = 0.8564186;
  k208 = 0.3662609;
  k209 = 0.374706;
  k210 = 0.7843413;
  k211 = 0.5647626;
  k212 = 0.962909;
  k213 = 0.6478348;
  k214 = 0.09925074;
  k215 = 0.4104971;
  k216 = 0.6775436;
  k217 = 0.2580911;
  k218 = 0.5921468;
  k219 = 0.7043261;
  k220 = 0.8301679;
  k221 = 0.1297174;
  k222 = 0.8315123;
  k223 = 0.652188;
  k224 = 0.0592143;
  k225 = 0.6807318;
  k226 = 0.989141;
  k227 = 0.0156957;
  k228 = 0.9994525;
  k229 = 0.7224923;
  k230 = 0.7722561;
  k231 = 0.3259594;
  k232 = 0.2007052;
  k233 = 0.8490797;
  k234 = 0.02603622;
  k235 = 0.8853003;
  k236 = 0.3576086;
  k237 = 0.564009;
  k238 = 0.8703038;
  k239 = 0.4605224;
  k240 = 0.1370846;
  k241 = 0.2822201;
  k242 = 0.5662156;

  // Reactions:
  r0: MEKPP|ERK|ERK => Raf1Star|ERK; k0*MEKPP|ERK|ERK;
  r1: Raf1Star|RKIP|RKIP => ERK|RKIP; k1*Raf1Star|RKIP|RKIP;
  r2: MEKPP|RKIPP => Raf1Star|RKIP|ERKPP|RKIPP; k2*MEKPP|RKIPP;
  r3: MEKPP|ERK|RKIPP => Raf1Star|RKIP|ERKPP|RKIPP; k3*MEKPP|ERK|RKIPP;
  r4: ERKPP|Raf1Star => RP|Raf1Star; k4*ERKPP|Raf1Star;
  r5: ERK|RP|RKIPP => MEKPP|RP|RKIPP; k5*ERK|RP|RKIPP;
  r6: ERKPP|RKIP => MEKPP|RKIP; k6*ERKPP|RKIP;
  r7: ERKPP + ERK => ERKPP|ERK; k7*ERKPP*ERK;
  r8: Raf1Star|RP|RKIPP => Raf1Star|RKIP|RP|RKIPP; k8*Raf1Star|RP|RKIPP;
  r9: RP|MEKPP|ERK => Raf1Star|RKIP|MEKPP|ERK; k9*RP|MEKPP|ERK;
  r10: Raf1Star|RKIP => MEKPP|ERK|RKIP; k10*Raf1Star|RKIP;
  r11: ERKPP + Raf1Star => ERKPP|Raf1Star; k11*ERKPP*Raf1Star;
  r12: ERK|MEKPP => RP|MEKPP; k12*ERK|MEKPP;
  r13: ERK|Raf1Star => Raf1Star|RKIP|ERKPP|Raf1Star; k13*ERK|Raf1Star;
  r14: RKIP|Raf1Star|RKIP => ERK|Raf1Star|RKIP; k14*RKIP|Raf1Star|RKIP;
  r15: ERKPP|Raf1Star|RKIP => ERKPP + Raf1Star|RKIP; k15*ERKPP|Raf1Star|RKIP;
  r16: Raf1Star|RKIP|RKIPP => ERK|RKIPP; k16*Raf1Star|RKIP|RKIPP;
  r17: RKIPP + RP => RKIPP|RP; k17*RKIPP*RP;
  r18: MEKPP|RKIP => Raf1Star|RKIP|ERKPP|RKIP; k18*MEKPP|RKIP;
  r19: RP|RKIPP|Raf1Star => MEKPP|Raf1Star; k19*RP|RKIPP|Raf1Star;
  r20: RP|ERK => RP + ERK; k20*RP|ERK;
  r21: MEKPP|ERK|RP => RKIPP|RP; k21*MEKPP|ERK|RP;
  r22: MEKPP|Raf1Star|RKIP => ERK|Raf1Star|RKIP; k22*MEKPP|Raf1Star|RKIP;
  r23: Raf1Star|Raf1Star|RKIP|ERKPP => Raf1Star|RKIP|Raf1Star|RKIP|ERKPP; k23*Raf1Star|Raf1Star|RKIP|ERKPP;
  r24: Raf1Star|RKIP|ERKPP|MEKPP => Raf1Star|RKIP|ERKPP + MEKPP; k24*Raf1Star|RKIP|ERKPP|MEKPP;
  r25: ERK|MEKPP => Raf1Star|MEKPP; k25*ERK|MEKPP;
  r26: MEKPP|ERK|ERK => RKIPP|ERK; k26*MEKPP|ERK|ERK;
  r27: ERKPP|RP => Raf1Star|RP; k27*ERKPP|RP;
  r28: RKIPP|ERKPP => Raf1Star|ERKPP; k28*RKIPP|ERKPP;
  r29: RKIP|ERK => RP|RKIPP|ERK; k29*RKIP|ERK;
  r30: MEKPP|Raf1Star|RKIP|ERKPP => Raf1Star|Raf1Star|RKIP|ERKPP; k30*MEKPP|Raf1Star|RKIP|ERKPP;
  r31: RKIPP|ERK => ERKPP|ERK; k31*RKIPP|ERK;
  r32: Raf1Star|MEKPP => RKIPP|MEKPP; k32*Raf1Star|MEKPP;
  r33: MEKPP|ERK|RKIP => Raf1Star|RKIP|ERKPP|RKIP; k33*MEKPP|ERK|RKIP;
  r34: RKIP|ERK => RP|ERK; k34*RKIP|ERK;
  r35: MEKPP|ERK|ERKPP => MEKPP|ERK + ERKPP; k35*MEKPP|ERK|ERKPP;
  r36: Raf1Star|ERKPP => ERK|ERKPP; k36*Raf1Star|ERKPP;
  r37: Raf1Star|RKIPP => MEKPP|RKIPP; k37*Raf1Star|RKIPP;
  r38: Raf1Star|RKIP|MEKPP => RP|RKIPP|MEKPP; k38*Raf1Star|RKIP|MEKPP;
  r39: Raf1Star + RKIPP => Raf1Star|RKIPP; k39*Raf1Star*RKIPP;
  r40: RP|RKIPP => Raf1Star|RKIP|RKIPP; k40*RP|RKIPP;
  r41: RP|MEKPP|ERK => ERK|MEKPP|ERK; k41*RP|MEKPP|ERK;
  r42: RKIPP|RP|RKIPP => Raf1Star|RP|RKIPP; k42*RKIPP|RP|RKIPP;
  r43: RP|ERKPP => MEKPP|ERK|ERKPP; k43*RP|ERKPP;
  r44: Raf1Star|RP => ERK|RP; k44*Raf1Star|RP;
  r45: RKIP|ERK => MEKPP|ERK|ERK; k45*RKIP|ERK;
  r46: MEKPP|MEKPP|ERK => ERK|MEKPP|ERK; k46*MEKPP|MEKPP|ERK;
  r47: Raf1Star|MEKPP => Raf1Star|RKIP|MEKPP; k47*Raf1Star|MEKPP;
  r48: ERK|MEKPP => Raf1Star|RKIP|ERKPP|MEKPP; k48*ERK|MEKPP;
  r49: MEKPP|Raf1Star|RKIP => MEKPP + Raf1Star|RKIP; k49*MEKPP|Raf1Star|RKIP;
  r50: RKIPP|Raf1Star => Raf1Star|RKIP|Raf1Star; k50*RKIPP|Raf1Star;
  r51: RP|RKIPP|ERKPP => ERK|ERKPP; k51*RP|RKIPP|ERKPP;
  r52: RP|RKIPP|RKIP => RKIPP|RKIP; k52*RP|RKIPP|RKIP;
  r53: Raf1Star|RKIP|RKIPP => Raf1Star|RKIP + RKIPP; k53*Raf1Star|RKIP|RKIPP;
  r54: Raf1Star|MEKPP => RKIP|MEKPP; k54*Raf1Star|MEKPP;
  r55: Raf1Star|MEKPP|ERK => Raf1Star|RKIP|MEKPP|ERK; k55*Raf1Star|MEKPP|ERK;
  r56: Raf1Star|RKIP|ERKPP|MEKPP => MEKPP|ERK|MEKPP; k56*Raf1Star|RKIP|ERKPP|MEKPP;
  r57: MEKPP|ERK + RKIPP => MEKPP|ERK|RKIPP; k57*MEKPP|ERK*RKIPP;
  r58: Raf1Star|RKIP|ERKPP|RP|RKIPP => RKIP|RP|RKIPP; k58*Raf1Star|RKIP|ERKPP|RP|RKIPP;
  r59: RP|RKIP => Raf1Star|RKIP|RKIP; k59*RP|RKIP;
  r60: Raf1Star|RKIPP => MEKPP|ERK|RKIPP; k60*Raf1Star|RKIPP;
  r61: Raf1Star|RKIP|ERKPP|MEKPP|ERK => Raf1Star|RKIP|ERKPP + MEKPP|ERK; k61*Raf1Star|RKIP|ERKPP|MEKPP|ERK;
  r62: MEKPP|Raf1Star|RKIP|ERKPP => ERKPP|Raf1Star|RKIP|ERKPP; k62*MEKPP|Raf1Star|RKIP|ERKPP;
  r63: RKIP|RKIPP => MEKPP|RKIPP; k63*RKIP|RKIPP;
  r64: RP|MEKPP => RP + MEKPP; k64*RP|MEKPP;
  r65: RKIPP|Raf1Star|RKIP|ERKPP => Raf1Star|RKIP|Raf1Star|RKIP|ERKPP; k65*RKIPP|Raf1Star|RKIP|ERKPP;
  r66: RKIP|Raf1Star => RKIP + Raf1Star; k66*RKIP|Raf1Star;
  r67: RP|RKIPP|MEKPP => Raf1Star|RKIP|ERKPP|MEKPP; k67*RP|RKIPP|MEKPP;
  r68: ERKPP|RKIPP => MEKPP|ERK|RKIPP; k68*ERKPP|RKIPP;
  r69: Raf1Star|Raf1Star|RKIP => ERKPP|Raf1Star|RKIP; k69*Raf1Star|Raf1Star|RKIP;
  r70: RKIPP|RP => MEKPP|ERK|RP; k70*RKIPP|RP;
  r71: RKIP|MEKPP|ERK => Raf1Star|RKIP|ERKPP|MEKPP|ERK; k71*RKIP|MEKPP|ERK;
  r72: Raf1Star|RKIP|ERKPP|Raf1Star|RKIP => MEKPP|ERK|Raf1Star|RKIP; k72*Raf1Star|RKIP|ERKPP|Raf1Star|RKIP;
  r73: RKIP|Raf1Star => MEKPP|Raf1Star; k73*RKIP|Raf1Star;
  r74: MEKPP|Raf1Star|RKIP => MEKPP|ERK|Raf1Star|RKIP; k74*MEKPP|Raf1Star|RKIP;
  r75: MEKPP|Raf1Star|RKIP|ERKPP => RKIP|Raf1Star|RKIP|ERKPP; k75*MEKPP|Raf1Star|RKIP|ERKPP;
  r76: ERK|MEKPP|ERK => RKIPP|MEKPP|ERK; k76*ERK|MEKPP|ERK;
  r77: RP|RKIPP|RP => Raf1Star|RKIP|RP; k77*RP|RKIPP|RP;
  r78: RP|RKIPP|Raf1Star|RKIP|ERKPP => MEKPP|ERK|Raf1Star|RKIP|ERKPP; k78*RP|RKIPP|Raf1Star|RKIP|ERKPP;
  r79: RP|RKIPP|Raf1Star|RKIP => MEKPP|ERK|Raf1Star|RKIP; k79*RP|RKIPP|Raf1Star|RKIP;
  r80: ERKPP|RKIPP => RP|RKIPP; k80*ERKPP|RKIPP;
  r81: ERKPP|RKIP => RKIPP|RKIP; k81*ERKPP|RKIP;
  r82: RKIP|RP|RKIPP => RP|RP|RKIPP; k82*RKIP|RP|RKIPP;
  r83: Raf1Star|RKIP|Raf1Star => Raf1Star|RKIP + Raf1Star; k83*Raf1Star|RKIP|Raf1Star;
  r84: Raf1Star|RKIP|ERKPP|RP => Raf1Star|RP; k84*Raf1Star|RKIP|ERKPP|RP;
  r85: MEKPP|ERKPP => Raf1Star|ERKPP; k85*MEKPP|ERKPP;
  r86: Raf1Star|RKIP|RP|RKIPP => RKIPP|RP|RKIPP; k86*Raf1Star|RKIP|RP|RKIPP;
  r87: RP|RKIP => MEKPP|RKIP; k87*RP|RKIP;
  r88: MEKPP|ERK|Raf1Star|RKIP => MEKPP|Raf1Star|RKIP; k88*MEKPP|ERK|Raf1Star|RKIP;
  r89: ERK|Raf1Star|RKIP|ERKPP => MEKPP|Raf1Star|RKIP|ERKPP; k89*ERK|Raf1Star|RKIP|ERKPP;
  r90: RKIPP|RP|RKIPP => RP|RP|RKIPP; k90*RKIPP|RP|RKIPP;
  r91: RP|ERK => Raf1Star|ERK; k91*RP|ERK;
  r92: MEKPP|ERK|RP|RKIPP => RKIP|RP|RKIPP; k92*MEKPP|ERK|RP|RKIPP;
  r93: Raf1Star|RKIP|MEKPP|ERK => ERKPP|MEKPP|ERK; k93*Raf1Star|RKIP|MEKPP|ERK;
  r94: ERK|RKIPP => ERK + RKIPP; k94*ERK|RKIPP;
  r95: RP|RKIPP|MEKPP|ERK => Raf1Star|MEKPP|ERK; k95*RP|RKIPP|MEKPP|ERK;
  r96: Raf1Star|RKIP|RP => ERKPP|RP; k96*Raf1Star|RKIP|RP;
  r97: Raf1Star|RKIP + RP => Raf1Star|RKIP|RP; k97*Raf1Star|RKIP*RP;
  r98: ERK|Raf1Star|RKIP => RKIP|Raf1Star|RKIP; k98*ERK|Raf1Star|RKIP;
  r99: ERKPP|Raf1Star => RKIP|Raf1Star; k99*ERKPP|Raf1Star;
  r100: RKIPP|Raf1Star|RKIP => ERKPP|Raf1Star|RKIP; k100*RKIPP|Raf1Star|RKIP;
  r101: MEKPP|ERK|MEKPP => Raf1Star|MEKPP; k101*MEKPP|ERK|MEKPP;
  r102: RKIPP|RP => ERKPP|RP; k102*RKIPP|RP;
  r103: MEKPP|Raf1Star|RKIP|ERKPP => RP|RKIPP|Raf1Star|RKIP|ERKPP; k103*MEKPP|Raf1Star|RKIP|ERKPP;
  r104: ERKPP|MEKPP|ERK => Raf1Star|RKIP|ERKPP|MEKPP|ERK; k104*ERKPP|MEKPP|ERK;
  r105: Raf1Star|ERKPP => RP|RKIPP|ERKPP; k105*Raf1Star|ERKPP;
  r106: RKIP|RP|RKIPP => Raf1Star|RP|RKIPP; k106*RKIP|RP|RKIPP;
  r107: Raf1Star|Raf1Star|RKIP|ERKPP => Raf1Star + Raf1Star|RKIP|ERKPP; k107*Raf1Star|Raf1Star|RKIP|ERKPP;
  r108: RKIPP|Raf1Star|RKIP => Raf1Star|Raf1Star|RKIP; k108*RKIPP|Raf1Star|RKIP;
  r109: MEKPP|MEKPP|ERK => ERKPP|MEKPP|ERK; k109*MEKPP|MEKPP|ERK;
  r110: Raf1Star + MEKPP => Raf1Star|MEKPP; k110*Raf1Star*MEKPP;
  r111: ERK|Raf1Star|RKIP => ERKPP|Raf1Star|RKIP; k111*ERK|Raf1Star|RKIP;
  r112: RKIPP|ERK => RP|ERK; k112*RKIPP|ERK;
  r113: MEKPP|ERK|ERK => ERKPP|ERK; k113*MEKPP|ERK|ERK;
  r114: MEKPP|Raf1Star|RKIP|ERKPP => MEKPP + Raf1Star|RKIP|ERKPP; k114*MEKPP|Raf1Star|RKIP|ERKPP;
  r115: RKIPP|RP => RKIP|RP; k115*RKIPP|RP;
  r116: Raf1Star|RKIP|RKIP => MEKPP|RKIP; k116*Raf1Star|RKIP|RKIP;
  r117: ERKPP + RP|RKIPP => ERKPP|RP|RKIPP; k117*ERKPP*RP|RKIPP;
  r118: RKIP|Raf1Star|RKIP => RP|RKIPP|Raf1Star|RKIP; k118*RKIP|Raf1Star|RKIP;
  r119: Raf1Star|RKIP|ERKPP|Raf1Star => RKIP|Raf1Star; k119*Raf1Star|RKIP|ERKPP|Raf1Star;
  r120: MEKPP|Raf1Star => MEKPP|ERK|Raf1Star; k120*MEKPP|Raf1Star;
  r121: ERKPP|Raf1Star => MEKPP|ERK|Raf1Star; k121*ERKPP|Raf1Star;
  r122: RKIPP|MEKPP => RKIPP + MEKPP; k122*RKIPP|MEKPP;
  r123: Raf1Star|RKIP|Raf1Star|RKIP|ERKPP => ERKPP|Raf1Star|RKIP|ERKPP; k123*Raf1Star|RKIP|Raf1Star|RKIP|ERKPP;
  r124: Raf1Star|RP|RKIPP => MEKPP|ERK|RP|RKIPP; k124*Raf1Star|RP|RKIPP;
  r125: Raf1Star|RKIP|RKIP => Raf1Star|RKIP|ERKPP|RKIP; k125*Raf1Star|RKIP|RKIP;
  r126: Raf1Star|RKIP|RP => ERK|RP; k126*Raf1Star|RKIP|RP;
  r127: RKIP|RP|RKIPP => RKIPP|RP|RKIPP; k127*RKIP|RP|RKIPP;
  r128: MEKPP|ERK|Raf1Star|RKIP => RP|Raf1Star|RKIP; k128*MEKPP|ERK|Raf1Star|RKIP;
  r129: Raf1Star|ERKPP => Raf1Star + ERKPP; k129*Raf1Star|ERKPP;
  r130: RP|RKIPP|Raf1Star => Raf1Star|RKIP|ERKPP|Raf1Star; k130*RP|RKIPP|Raf1Star;
  r131: Raf1Star|Raf1Star|RKIP => Raf1Star|RKIP|ERKPP|Raf1Star|RKIP; k131*Raf1Star|Raf1Star|RKIP;
  r132: MEKPP|ERK|ERK => RP|ERK; k132*MEKPP|ERK|ERK;
  r133: RKIPP|MEKPP => Raf1Star|RKIP|ERKPP|MEKPP; k133*RKIPP|MEKPP;
  r134: MEKPP|MEKPP|ERK => RP|RKIPP|MEKPP|ERK; k134*MEKPP|MEKPP|ERK;
  r135: MEKPP|ERK|RP => ERK|RP; k135*MEKPP|ERK|RP;
  r136: RKIPP|ERK => RKIP|ERK; k136*RKIPP|ERK;
  r137: RP|RKIPP|ERKPP => MEKPP|ERK|ERKPP; k137*RP|RKIPP|ERKPP;
  r138: RP|RKIPP|RP => RP|RKIPP + RP; k138*RP|RKIPP|RP;
  r139: RP|RKIPP|RKIPP => RP|RKIPP; k139*RP|RKIPP|RKIPP;
  r140: RKIP|RP => Raf1Star|RKIP|ERKPP|RP; k140*RKIP|RP;
  r141: MEKPP|ERK|RP|RKIPP => ERKPP|RP|RKIPP; k141*MEKPP|ERK|RP|RKIPP;
  r142: Raf1Star|RKIP|MEKPP|ERK => RKIP|MEKPP|ERK; k142*Raf1Star|RKIP|MEKPP|ERK;
  r143: RKIPP + ERKPP => RKIPP|ERKPP; k143*RKIPP*ERKPP;
  r144: Raf1Star|RKIP|ERKPP|RP => ERKPP|RP; k144*Raf1Star|RKIP|ERKPP|RP;
  r145: ERKPP|RP => MEKPP|RP; k145*ERKPP|RP;
  r146: RP|RKIPP + RKIP => RP|RKIPP|RKIP; k146*RP|RKIPP*RKIP;
  r147: Raf1Star|RKIP + MEKPP|ERK => Raf1Star|RKIP|MEKPP|ERK; k147*Raf1Star|RKIP*MEKPP|ERK;
  r148: Raf1Star|RKIP|ERKPP|RKIPP => Raf1Star|RKIPP; k148*Raf1Star|RKIP|ERKPP|RKIPP;
  r149: MEKPP + RP|RKIPP => MEKPP|RP|RKIPP; k149*MEKPP*RP|RKIPP;
  r150: RKIPP|ERKPP => RP|ERKPP; k150*RKIPP|ERKPP;
  r151: RP|RKIPP|RKIP => MEKPP|ERK|RKIP; k151*RP|RKIPP|RKIP;
  r152: ERKPP|Raf1Star|RKIP => RKIPP|Raf1Star|RKIP; k152*ERKPP|Raf1Star|RKIP;
  r153: Raf1Star|RKIP|ERKPP + RP => Raf1Star|RKIP|ERKPP|RP; k153*Raf1Star|RKIP|ERKPP*RP;
  r154: Raf1Star|RKIP|ERKPP|MEKPP => ERK|MEKPP; k154*Raf1Star|RKIP|ERKPP|MEKPP;
  r155: RKIPP|RKIP => RKIPP + RKIP; k155*RKIPP|RKIP;
  r156: Raf1Star|RKIP|ERKPP|ERK => RP|ERK; k156*Raf1Star|RKIP|ERKPP|ERK;
  r157: RKIPP|RP => MEKPP|RP; k157*RKIPP|RP;
  r158: Raf1Star|Raf1Star|RKIP|ERKPP => MEKPP|ERK|Raf1Star|RKIP|ERKPP; k158*Raf1Star|Raf1Star|RKIP|ERKPP;
  r159: Raf1Star|RKIP|ERK => RP|RKIPP|ERK; k159*Raf1Star|RKIP|ERK;
  r160: RKIP|Raf1Star => RP|Raf1Star; k160*RKIP|Raf1Star;
  r161: ERK + Raf1Star|RKIP|ERKPP => ERK|Raf1Star|RKIP|ERKPP; k161*ERK*Raf1Star|RKIP|ERKPP;
  r162: MEKPP|RKIPP => RP|RKIPP; k162*MEKPP|RKIPP;
  r163: Raf1Star|RKIP|ERKPP|ERKPP => RKIP|ERKPP; k163*Raf1Star|RKIP|ERKPP|ERKPP;
  r164: Raf1Star|RKIP|ERKPP|RP|RKIPP => ERK|RP|RKIPP; k164*Raf1Star|RKIP|ERKPP|RP|RKIPP;
  r165: RP|RKIPP|Raf1Star|RKIP|ERKPP => ERK|Raf1Star|RKIP|ERKPP; k165*RP|RKIPP|Raf1Star|RKIP|ERKPP;
  r166: Raf1Star|Raf1Star|RKIP|ERKPP => RKIP|Raf1Star|RKIP|ERKPP; k166*Raf1Star|Raf1Star|RKIP|ERKPP;
  r167: RP|RKIPP|MEKPP|ERK => RP|RKIPP + MEKPP|ERK; k167*RP|RKIPP|MEKPP|ERK;
  r168: ERK|RKIP => MEKPP|ERK|RKIP; k168*ERK|RKIP;
  r169: ERKPP|RP => RKIPP|RP; k169*ERKPP|RP;
  r170: Raf1Star|ERKPP => Raf1Star|RKIP|ERKPP; k170*Raf1Star|ERKPP;
  r171: MEKPP|ERK|ERK => Raf1Star|RKIP|ERKPP|ERK; k171*MEKPP|ERK|ERK;
  r172: RKIP + RP => RKIP|RP; k172*RKIP*RP;
  r173: Raf1Star|RKIP|ERKPP|RKIP => MEKPP|ERK|RKIP; k173*Raf1Star|RKIP|ERKPP|RKIP;
  r174: RKIP|Raf1Star|RKIP => RKIP + Raf1Star|RKIP; k174*RKIP|Raf1Star|RKIP;
  r175: Raf1Star + RKIP => Raf1Star|RKIP; k175*Raf1Star*RKIP;
  r176: RP|RKIPP|Raf1Star|RKIP => Raf1Star|RKIP|ERKPP|Raf1Star|RKIP; k176*RP|RKIPP|Raf1Star|RKIP;
  r177: RP|RKIPP|RKIP => ERKPP|RKIP; k177*RP|RKIPP|RKIP;
  r178: Raf1Star|RKIP|ERKPP|Raf1Star|RKIP => RP|RKIPP|Raf1Star|RKIP; k178*Raf1Star|RKIP|ERKPP|Raf1Star|RKIP;
  r179: MEKPP|ERK|RP => Raf1Star|RKIP|ERKPP|RP; k179*MEKPP|ERK|RP;
  r180: Raf1Star|RKIP|ERKPP|Raf1Star => MEKPP|ERK|Raf1Star; k180*Raf1Star|RKIP|ERKPP|Raf1Star;
  r181: RKIP|RKIPP => Raf1Star|RKIP|RKIPP; k181*RKIP|RKIPP;
  r182: MEKPP|ERK => Raf1Star|RKIP|ERK; k182*MEKPP|ERK;
  r183: RP|ERKPP => ERK|ERKPP; k183*RP|ERKPP;
  r184: Raf1Star|RKIP|ERKPP|Raf1Star => ERKPP|Raf1Star; k184*Raf1Star|RKIP|ERKPP|Raf1Star;
  r185: RP|RP|RKIPP => RKIPP|RP|RKIPP; k185*RP|RP|RKIPP;
  r186: Raf1Star|RKIP|ERKPP|MEKPP => RP|RKIPP|MEKPP; k186*Raf1Star|RKIP|ERKPP|MEKPP;
  r187: MEKPP|RP => ERK|RP; k187*MEKPP|RP;
  r188: MEKPP|Raf1Star|RKIP => RKIP|Raf1Star|RKIP; k188*MEKPP|Raf1Star|RKIP;
  r189: ERK|Raf1Star|RKIP => RP|Raf1Star|RKIP; k189*ERK|Raf1Star|RKIP;
  r190: RKIP + Raf1Star => RKIP|Raf1Star; k190*RKIP*Raf1Star;
  r191: ERKPP|Raf1Star|RKIP|ERKPP => RP|RKIPP|Raf1Star|RKIP|ERKPP; k191*ERKPP|Raf1Star|RKIP|ERKPP;
  r192: RKIPP|RKIP => MEKPP|ERK|RKIP; k192*RKIPP|RKIP;
  r193: MEKPP|Raf1Star => RP|RKIPP|Raf1Star; k193*MEKPP|Raf1Star;
  r194: RKIPP|RP|RKIPP => MEKPP|ERK|RP|RKIPP; k194*RKIPP|RP|RKIPP;
  r195: Raf1Star|RKIP|ERK => RP|ERK; k195*Raf1Star|RKIP|ERK;
  r196: ERKPP|RKIPP => RP|RKIPP|RKIPP; k196*ERKPP|RKIPP;
  r197: ERKPP|Raf1Star|RKIP|ERKPP => ERKPP + Raf1Star|RKIP|ERKPP; k197*ERKPP|Raf1Star|RKIP|ERKPP;
  r198: MEKPP|Raf1Star|RKIP => RKIPP|Raf1Star|RKIP; k198*MEKPP|Raf1Star|RKIP;
  r199: ERK|RP|RKIPP => RKIP|RP|RKIPP; k199*ERK|RP|RKIPP;
  r200: ERKPP|RKIP => ERK|RKIP; k200*ERKPP|RKIP;
  r201: ERK|MEKPP => ERK + MEKPP; k201*ERK|MEKPP;
  r202: Raf1Star|RKIPP => RKIP|RKIPP; k202*Raf1Star|RKIPP;
  r203: RKIP|ERK => ERKPP|ERK; k203*RKIP|ERK;
  r204: Raf1Star|RKIP|ERKPP|RKIPP => Raf1Star|RKIP|ERKPP + RKIPP; k204*Raf1Star|RKIP|ERKPP|RKIPP;
  r205: MEKPP|RKIPP => RP|RKIPP|RKIPP; k205*MEKPP|RKIPP;
  r206: RP|RKIPP|Raf1Star|RKIP => MEKPP|Raf1Star|RKIP; k206*RP|RKIPP|Raf1Star|RKIP;
  r207: MEKPP + ERK => MEKPP|ERK; k207*MEKPP*ERK;
  r208: RKIP|MEKPP => Raf1Star|MEKPP; k208*RKIP|MEKPP;
  r209: RP|RKIPP|ERK => MEKPP|ERK; k209*RP|RKIPP|ERK;
  r210: MEKPP|ERK|RKIPP => RP|RKIPP|RKIPP; k210*MEKPP|ERK|RKIPP;
  r211: ERK|MEKPP => Raf1Star|RKIP|MEKPP; k211*ERK|MEKPP;
  r212: RP|RKIPP|Raf1Star|RKIP|ERKPP => ERKPP|Raf1Star|RKIP|ERKPP; k212*RP|RKIPP|Raf1Star|RKIP|ERKPP;
  r213: Raf1Star|RKIP|ERKPP|MEKPP|ERK => ERK|MEKPP|ERK; k213*Raf1Star|RKIP|ERKPP|MEKPP|ERK;
  r214: RP|MEKPP|ERK => RKIP|MEKPP|ERK; k214*RP|MEKPP|ERK;
  r215: RP|ERK => RKIP|ERK; k215*RP|ERK;
  r216: RP|ERK => RP|RKIPP|ERK; k216*RP|ERK;
  r217: ERKPP|MEKPP => Raf1Star|RKIP|ERKPP|MEKPP; k217*ERKPP|MEKPP;
  r218: RKIP + ERKPP => RKIP|ERKPP; k218*RKIP*ERKPP;
  r219: Raf1Star|RKIP|ERKPP|MEKPP|ERK => Raf1Star|RKIP|MEKPP|ERK; k219*Raf1Star|RKIP|ERKPP|MEKPP|ERK;
  r220: RP|Raf1Star|RKIP => RP + Raf1Star|RKIP; k220*RP|Raf1Star|RKIP;
  r221: MEKPP|RP|RKIPP => MEKPP|ERK|RP|RKIPP; k221*MEKPP|RP|RKIPP;
  r222: Raf1Star|RKIP|ERKPP|MEKPP|ERK => RKIPP|MEKPP|ERK; k222*Raf1Star|RKIP|ERKPP|MEKPP|ERK;
  r223: MEKPP|RP => ERKPP|RP; k223*MEKPP|RP;
  r224: ERK|RP => Raf1Star|RP; k224*ERK|RP;
  r225: RKIP|Raf1Star => Raf1Star|RKIP|ERKPP|Raf1Star; k225*RKIP|Raf1Star;
  r226: RKIPP|ERKPP => RP|RKIPP|ERKPP; k226*RKIPP|ERKPP;
  r227: ERK|RKIPP => Raf1Star|RKIPP; k227*ERK|RKIPP;
  r228: ERKPP|Raf1Star|RKIP => RKIP|Raf1Star|RKIP; k228*ERKPP|Raf1Star|RKIP;
  r229: RKIPP|ERKPP => RKIPP + ERKPP; k229*RKIPP|ERKPP;
  r230: Raf1Star|RKIP|ERKPP|MEKPP|ERK => ERKPP|MEKPP|ERK; k230*Raf1Star|RKIP|ERKPP|MEKPP|ERK;
  r231: ERKPP|Raf1Star|RKIP => Raf1Star|RKIP|ERKPP|Raf1Star|RKIP; k231*ERKPP|Raf1Star|RKIP;
  r232: Raf1Star|RKIP|ERKPP|ERKPP => MEKPP|ERK|ERKPP; k232*Raf1Star|RKIP|ERKPP|ERKPP;
  r233: ERK|ERKPP => Raf1Star|ERKPP; k233*ERK|ERKPP;
  r234: RP|RKIPP|Raf1Star => RKIPP|Raf1Star; k234*RP|RKIPP|Raf1Star;
  r235: RP|RP|RKIPP => RKIP|RP|RKIPP; k235*RP|RP|RKIPP;
  r236: MEKPP|ERK|Raf1Star => MEKPP|ERK + Raf1Star; k236*MEKPP|ERK|Raf1Star;
  r237: RP|RKIPP|ERKPP => RKIP|ERKPP; k237*RP|RKIPP|ERKPP;
  r238: RP|RKIPP|MEKPP => RP|RKIPP + MEKPP; k238*RP|RKIPP|MEKPP;
  r239: ERKPP|RKIPP => MEKPP|RKIPP; k239*ERKPP|RKIPP;
  r240: RP|RKIPP|ERK => RKIP|ERK; k240*RP|RKIPP|ERK;
  r241: Raf1Star|Raf1Star|RKIP|ERKPP => RP|Raf1Star|RKIP|ERKPP; k241*Raf1Star|Raf1Star|RKIP|ERKPP;
  r242: MEKPP|RKIPP => Raf1Star|RKIP|RKIPP; k242*MEKPP|RKIPP;
end
